*
* Plate with a hole (Kirsch problem), Chapter 2
* exercise "A plate with a hole: Kirsch against finite elements"
*
* STATUS: provided as a starting point; NOT RUN when the notes were
* prepared (Cast3M was not available). Reference values from
* python/examples/ch2/kirsch_fem.py (linear triangles, plate 20a x 20a):
* sigma_xx(0, a) = 3.02, Kirsch (infinite plate): 3.
*
* Quarter of a square plate [0, L]^2 with a hole of radius a, plane
* stress, remote tension s along x applied on the edge x = L, symmetry
* conditions UX = 0 on x = 0 and UY = 0 on y = 0. Dimensionless units.
* NB: Cast3M evaluates arithmetic from left to right, without
* precedence: keep the parentheses.
*
* STEP 1  options: plane stress, linear triangles
*
  opti dime 2 mode plan cont elem tri3 echo 1;
*
* STEP 2  mesh: two blocks separated by the diagonal, graded from the hole
*
* a: hole radius, ll: half side of the plate (side 40a), s: remote tension.
* nt: cells along the quarter hole (nt2 per block), nr: cells along a radius.
* dh: cell size on the hole (arc length a pi/2 divided by nt).
  a = 1.; ll = 20.; s = 1.;
  nt = 24;  nt2 = nt / 2;  nr = 48;
  dh = (a * 3.14159) / (2. * nt);
* Points: centre o, p1 and p5 on the hole, p2 p3 p4 corners of the plate,
* pm on the hole at 45 degrees (Cast3M angles are in degrees).
  o  = 0. 0.;
  p1 = a 0.;  p2 = ll 0.;  p3 = ll ll;  p4 = 0. ll;  p5 = 0. a;
  pm = (a * (cos 45.)) (a * (sin 45.));
* Lines: DINI / DFIN are the first and last cell sizes (geometric grading,
* small at the hole). cerc: arc of circle with centre o.
  l12 = droi nr p1 p2 'DINI' dh 'DFIN' (ll / nt2);
  l23 = droi nt2 p2 p3;
  l3m = droi nr p3 pm 'DINI' (ll / nt2) 'DFIN' dh;
  c1m = cerc nt2 p1 o pm;
  l34 = droi nt2 p3 p4;
  l45 = droi nr p4 p5 'DINI' (ll / nt2) 'DFIN' dh;
  c5m = cerc nt2 p5 o pm;
* dall: transfinite mesh of the quadrangle bounded by four lines; elim merges
* the coincident nodes of the two blocks along the diagonal p3-pm.
  dom1 = dall l12 l23 l3m (inve c1m);
  dom2 = dall (inve l3m) l34 l45 c5m;
  dom  = dom1 et dom2;
  elim dom 1.e-6;
  trac dom;
*
* STEP 3  model, material, stiffness
*
* Isotropic linear elasticity, E = 1, nu = 0.3; kk is the stiffness matrix K.
  mo = mode dom mecanique elastique isotrope;
  ma = mate mo 'YOUN' 1. 'NU' 0.3;
  kk = rigi mo ma;
*
* STEP 4  boundary conditions (Lagrange multipliers) and load:
*         a negative pressure on x = L is a tension s
*
* Symmetry: UY = 0 on y = 0 (line l12), UX = 0 on x = 0 (line l45). bloq adds
* the constraints with Lagrange multipliers (the reactions, Section 2.7.2).
  bc = (bloq uy l12) et (bloq ux l45);
  ff = pres mass mo (-1. * s) l23;
*
* STEP 5  solution, stresses at the Gauss points, nodal stresses
*
* Solve (K + constraints) u = F; sigm gives the stresses at the Gauss points,
* chan 'CHPO' averages them at the nodes (as in the Python version).
  u   = reso (kk et bc) ff;
  sig = sigm mo ma u;
  sgn = chan 'CHPO' mo sig;
  trac sig mo dom;
  sa  = extr sgn 'SMXX' p5;
  mess 'sigma_xx(0, a) =' sa '   Kirsch: 3';
*
* STEP 6  hoop stress on the hole against Kirsch, s (1 - 2 cos 2 theta)
*
* Loop over the nodes of the hole: theta = acos(x/r) in degrees (no ATG), hoop stress
* sigma_tt = sx sin^2 + sy cos^2 - 2 sxy sin cos, and Kirsch's value.
  hole = chan poi1 (c1m et c5m);
  lth = prog;  lfe = prog;  lki = prog;
  repe bou (nbno hole);
    pp  = poin hole &bou;
    xx  = coor 1 pp;  yy = coor 2 pp;
    th  = acos (xx / (((xx * xx) + (yy * yy)) ** 0.5));
    cc  = cos th;  ss = sin th;
    sx  = extr sgn 'SMXX' pp;
    sy  = extr sgn 'SMYY' pp;
    sxy = extr sgn 'SMXY' pp;
    stt = ((sx * ss) * ss) + ((sy * cc) * cc);
    stt = stt - (((2. * sxy) * ss) * cc);
    lth = lth et (prog th);
    lfe = lfe et (prog stt);
    lki = lki et (prog (s * (1. - (2. * (cos (2. * th))))));
  fin bou;
* Curves sigma_tt(theta): finite elements (red) and Kirsch (blue).
  evfe = evol rouge manu 'THETA' lth 'SIGTT' lfe;
  evki = evol bleu  manu 'THETA' lth 'SIGTT' lki;
  dess (evfe et evki);
*
  opti donn 5;
fin;
